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# Институт транспортной техники и систем управления
# Кафедра "Упарвление и защита информации"
## Практическое задание №6
по дисциплине: «Цифровые технологии»
на тему: «Построение графиков функциональных зависимостей в
# системе автоматизированного проектирования MathCAD»
# Выполнил: ст гр. ТБЖ-311
# Катеруша К.В.
# Вариант №13
# Проверил: к.т.н., доц. Сафонов А.И.
# Москва-2023
# Цель:
# В пакете прикладных программ MathCAD выполнить построение графиков функциональных зависимостей
# Задачи:
# ­Выполнить построение графиков функциональных зависимостей:
# —гладкая функциональная зависимость;
# —функциональная зависимость с разрывами;
# —функциональная зависимость в полярной системе координат;
# —функциональная зависимость в логарифмическом масштабе.
# Содержательная часть работы:
# 1. График гладкой функциональной зависимости
y_1(x) := x^3 - x
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# 2. Построение функциональных зависимостей с разрывом
y_2(x) := ln(x)/x
# Построение функций асипмтот:
# Рассчет параметра k:
limit(y_2(x)/x, x → ∞) → 0
k := 0
# Рассчет параметра b:
c_x(x) := limit(y_2(x)/x, x → ∞)*x + limit(y_2(x), x → ∞) → 0  # - горизонтальная асимтота
limit(y_2(x), x → 0+) → -∞
limit(y_2(x), x → 0-) → ∞ - 1i*∞
c_y1(x) := 0  # - вертикальная асимптота
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# 3. Построение графика в полярных координатах
y_3(x) := x^3*cos(x)^2
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φ := 0, π/36 .. 2*π
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# 4. Построение графиков в логарифмическом масштабе
y_4_1(x) := sinh(x)
y_4_2(x) := ln(x)
y_4_3(x) := e^x
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# Вывод:
# В пакете прикладных программ MathCAD были построенны графики функциональных зависимостей, а именно:
# гладкая функциональная зависимость;
# функциональная зависимость с разрывами;
# функциональная зависимость в полярной системе координат;
# функциональная зависимость в логарифмическом масштабе.
